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/BATCH
/COM,ANSYS RELEASE Release 17.0      BUILD 17.0      UP20151214       13:03:46
/input,menust,tmp,''
/GST,ON
/PLO,INFO,3
/GRO,CURL,ON
/CPLANE,1
WPSTYLE,,,,,,,,0
! bsplin
lab6
/COM,ANSYS RELEASE Release 17.0      BUILD 17.0      UP20151214       13:17:01
lab6
/COM,ANSYS RELEASE Release 17.0      BUILD 17.0      UP20151214       13:18:42
LAB6
/COM,ANSYS RELEASE Release 17.0      BUILD 17.0      UP20151214       13:18:49
! lab.mac
lab6
/COM,ANSYS RELEASE Release 17.0      BUILD 17.0      UP20151214       13:18:59
! РЕКТАЛЬНИК
lab6
/COM,ANSYS RELEASE Release 17.0      BUILD 17.0      UP20151214       13:23:25
lab6
/COM,ANSYS RELEASE Release 17.0      BUILD 17.0      UP20151214       13:23:33
GPLOT
VPLOT
lab6
/COM,ANSYS RELEASE Release 17.0      BUILD 17.0      UP20151214       13:24:17
lab6
/COM,ANSYS RELEASE Release 17.0      BUILD 17.0      UP20151214       13:26:07
/PREP7
FINISH
/SOL
FINISH
/PREP7
bsplin
lab6
/COM,ANSYS RELEASE Release 17.0      BUILD 17.0      UP20151214       13:30:47
! bsplin
lab6
/COM,ANSYS RELEASE Release 17.0      BUILD 17.0      UP20151214       13:30:59
! bsplin
lab6
/COM,ANSYS RELEASE Release 17.0      BUILD 17.0      UP20151214       13:31:14
/EFACET,1
PLNSOL, PRES,, 0
PLESOL, VOLU,, 0,1.0
GPLOT
PLDISP,1
SET,FIRST
INRES,ALL
FILE,'lab6','rfl','.'
SET,LIST
SET,LAST
/EFACET,1
PLNSOL, PRES,, 0
lab6
/COM,ANSYS RELEASE Release 17.0      BUILD 17.0      UP20151214       13:33:25
PLNSOL,V,x
FLST,2,23,8
FITEM,2,-0.3,0,0
FITEM,2,-0.3,0,0
FITEM,2,-0.3,0,0
FITEM,2,-0.3,0.5E-01,0
FITEM,2,-0.3,0.1,0
FITEM,2,-0.25,0.15,0
FITEM,2,-0.3,0.15,0
FITEM,2,-0.25,0.1,0
FITEM,2,-0.25,0.5E-01,0
FITEM,2,-0.25,0,0
FITEM,2,-0.25,-0.5E-01,0
FITEM,2,-0.3,-0.5E-01,0
FITEM,2,-0.3,-0.1,0
FITEM,2,-0.25,-0.1,0
FITEM,2,-0.2,-0.1,0
FITEM,2,-0.2,-0.5E-01,0
FITEM,2,-0.2,0,0
FITEM,2,-0.2,0.5E-01,0
FITEM,2,-0.2,0.1,0
FITEM,2,-0.2,0.15,0
FITEM,2,-0.3,-0.15,0
FITEM,2,-0.25,-0.15,0
FITEM,2,-0.2,-0.15,0
TRPOIN,P51X,P51X
FLST,2,9,8
FITEM,2,-0.35,0.15,0
FITEM,2,-0.35,0.1,0
FITEM,2,-0.35,0.5E-01,0
FITEM,2,-0.35,0,0
FITEM,2,-0.35,-0.5E-01,0
FITEM,2,-0.35,-0.15,0
FITEM,2,-0.35,-0.2,0
FITEM,2,-0.35,-0.1,0
FITEM,2,-0.35,-0.2,0
TRPOIN,P51X,P51X
PLTRAC,FLUID,PRES,,0,TRAC,25, ,0
lab6
/COM,ANSYS RELEASE Release 17.0      BUILD 17.0      UP20151214       13:39:28
lab6
/COM,ANSYS RELEASE Release 17.0      BUILD 17.0      UP20151214       13:40:24
lab6
/COM,ANSYS RELEASE Release 17.0      BUILD 17.0      UP20151214       13:41:21
lab6
/COM,ANSYS RELEASE Release 17.0      BUILD 17.0      UP20151214       13:41:45
lab6
/COM,ANSYS RELEASE Release 17.0      BUILD 17.0      UP20151214       13:41:58
! bsplin
lab6
/COM,ANSYS RELEASE Release 17.0      BUILD 17.0      UP20151214       13:42:20
FINISH
/SOL
FINISH
/POST1
/EFACET,1
PLNSOL, PRES,, 0
FINISH
! /EXIT,ALL
